# Input file for Stack Fault Energy surface of Nickel: originally Richard Glaze, 2014
# Modified Dec 2019 for generalised stacking faults

# --------------------- INITIALIZAITION ---------------------
clear
units metal
dimension 3
boundary p p p
atom_style atomic
variable sca equal 16
variable scb equal 28
variable scc equal 10
variable latparam1 equal 3.52
variable x_displace equal -1*(${latparam1}/sqrt(6))
variable xdim equal ${latparam1}*sqrt(6)/2*${sca}
variable ydim equal ${latparam1}*sqrt(2)/2*${scb}
variable zmid equal ${latparam1}*sqrt(3)*${scc}
variable ztop equal ${zmid}*2
variable app_press equal 1.0
# --------------------- ATOM DEFINITION ---------------------
region 1 block -.001 ${xdim} -.001 ${ydim} -.001 ${zmid} units box
region 2 block -.001 ${xdim} -.001 ${ydim} ${zmid} ${ztop} units box
region whole block 0 ${xdim} 0 ${ydim} 0 ${ztop} units box
read_data alloyified_elemental.data
# --------------------- FORCE FIELDS ---------------------
pair_style eam/alloy
pair_coeff * * ../../NiAlCoCrMoTiWTa.set Al Co Ni
#pair_coeff * * Ni99.eam.alloy Ni Ni
# --------------------- SETTINGS ---------------------
compute peratom all pe/atom
compute eatoms all reduce sum c_peratom
compute csym all centro/atom fcc
thermo 1
thermo_style custom step pe c_eatoms
run 0
#this command creates a model of the script before the displacement and minimization occur
variable E equal "c_eatoms"
variable Eo equal $E
#variable E equal "c_eatoms" computes the initial energy of the model before any sliding is done
#E is necessary to store the initial energy in Eo
group bot region 1
group top region 2

fix 1 all box/relax iso ${app_press} vmax 0.001
min_style cg
minimize 1e-10 1e-10 1000 1000
variable Ef equal "c_eatoms"
variable Cf equal 1.60217657e-16
variable A equal (cella*cellb)*1e-20
variable xdisptot equal cella/${sca}
variable SFE equal ((${Ef}-${Eo})*${Cf})/${A}

####################################
# SIMULATION DONE
print "All done"
print "Total lattice in x dir = ${xdisptot} A"
print "Initial energy of atoms = ${Eo} eV"
print "Final energy of atoms = ${Ef} eV"
print "Stacking-fault energy = ${SFE} mJ/m^2"

write_restart restart.opt
